# Bead-spring polymer simulation with small-molecule diffusion - lj
# 160-mers
# 25 chains
# FENE potential repulsive all sites, with interactive temperature

units lj

shell	       echo 1.0 > Tempfile.txt
shell	       echo 1.0 > Bondfile.txt

variable       myTempStr file Tempfile.txt
variable       myTemp equal v_myTempStr

variable       myBondStr file Bondfile.txt
variable       myBond equal v_myBondStr


neighbor	0.4 bin
neigh_modify	every 1 delay 5 check yes

atom_style 	molecular

comm_modify	cutoff 5.0

# soft potential for initial pushoff
pair_style	lj/cut 1.12246
pair_modify	shift yes
bond_style	harmonic

# filename of the data-file (or restart-file) to be used
#read_data	newdataNbead160.txt
read_restart	restartsoft1

# pair coefficients
pair_coeff	* * 1.0 1.0
#pair_coeff	* * 10.0

bond_coeff	* 500.0 1.0

#special_bonds	lj 0.0 1.0 1.0

# set the timestep in the specified units
timestep	0.001

thermo_style	one

# set the parameters here
fix 1 all nve/limit 0.01
fix 3 all langevin v_myTemp 1.0 1.0 39253

thermo		100
run 10000

unfix 1

fix 4 all nve

# set Interactive Molecular Dynamics

fix com all imd 5678 trate 5 unwrap on #fscale #10.0

reset_timestep 	0

# change the 8000 to change how often to save the positions of the atoms
#dump 		1 all custom 500 position_imd.lammpstrj id type xs ys zs ix iy iz

# how often to output thermodynamic data

# how often to outout restart files and their names
#restart       5000000 restartimd1 restartimd2

label          loop2here

# specifies the run length in timesteps
run            2000
shell          head -n 2 Temp.txt | tail -n 1 >> Tempfile.txt
shell          head -n 2 Bond.txt | tail -n 1 >> Bondfile.txt
next           myTempStr
next           myBondStr
if "${myBond} == 0" then "jump imdinput.txt breakbonds"
if "${myBond} <= -1" then "jump imdinput.txt nobonds"
jump           imdinput.txt loop2here

label          breakbonds
fix	5 all bond/break 1 2 0
jump           imdinput.txt loop2here

label          nobonds
bond_style none
jump           imdinput.txt loop2here
